# СМО (20 вариант)
p := 0.5
_p := 1 - p = 0.5
p1 := 0.65
_p1 := 1 - p1 = 0.35
p2 := 0.55
_p2 := 1 - p2 = 0.45
P000 := 0
P101 := 0
P021 := 0
P100 := 0
P011 := 0
P121 := 0
P001 := 0
P111 := 0
P221 := 0
Given
P000 == p*P000 + p*_p2*P001
P100 == p1*P100 + _p*P000 + _p*_p2*P001 + p1*_p2*P101
P001 == p*p2*P001 + p*_p1*P100 + p*_p1*_p2*P101 + p*_p2*P011
P101 == p1*p2*P101 + _p*_p1*_p2*P101 + _p*p2*P001 + _p*_p1*P100 + p1*_p2*P111 + (1 - p)*(1 - p2)*P011
P011 == p*p2*P011 + p*_p1*p2*P101 + p*_p1*_p2*P111 + p*_p2*P021
P111 == p1*p2*P111 + _p*_p1*_p2*P111 + _p*p2*P011 + _p*_p1*p2*P101 + _p*_p2*P021
P021 == P021*p*p2 + P221*p*_p2 + P121*p*_p1*_p2 + P111*p*_p1*p2
P121 == P121*p1*p2 + P121*_p*_p1*_p2 + P111*_p*_p1*p2 + P021*_p*p2 + P221*_p*_p2
P221 == P121*_p*p2 + P221*p2
P000 + P100 + P001 + P101 + P011 + P111 + P021 + P121 + P221 == 1
[P000; P100; P001; P101; P011; P111; P021; P121; P221] := Minerr(P000, P100, P001, P101, P011, P111, P021, P121, P221) = [0.061403; 0.375549; 0.132495; 0.239484; 0.0471037; 0.0731673; 0.0200799; 0.0308131; 0.0198999]
Pбл := P221 = 0.0198999
A := (1 - P000 - P100)*_p2 = 0.253371
λ := 1 - p = 0.5
Q := A/λ = 0.506743
Pотк := 1 - Q = 0.493257
Lоч := P011 + P111 + P021 + P121 + P221 = 0.191064
Lс := 1*(P100 + P001) + 2*(P101 + P011) + 3*(P111 + P021) + 4*(P121 + P221) = 1.56381
Wоч := Lоч/A = 0.754086
Wс := Lс/A = 6.17202
Kkan1 := P100 + P101 + P111 + P121 + P221 = 0.738914
Kkan2 := P001 + P011 + P021 + P121 + P221 = 0.250391
